<?xml version="1.0" encoding="UTF-8"?>
<neuroml xmlns="http://www.neuroml.org/schema/neuroml2"
         xmlns:xsi="http://www.w3.org/2001/XMLSchema-instance"
         xsi:schemaLocation="http://www.neuroml.org/schema/neuroml2  https://raw.github.com/NeuroML/NeuroML2/development/Schemas/NeuroML2/NeuroML_v2beta4.xsd"
         id="NeuronMuscle">

    <include href="SingleCompMuscle.cell.nml"/>

    <expTwoSynapse id="exc_syn_1conns" erev="0mV" gbase="25nS" tauDecay="10ms" tauRise="1ms"/>

    <iafCell id="iafNeuron_Sensor" reset="-70mV" C="0.4nF" thresh="-50mV" leakConductance="0.02uS" leakReversal="-70mV"/>
    <iafCell id="iafNeuron_Motor" reset="-70mV" C="0.4nF" thresh="-50mV" leakConductance="0.02uS" leakReversal="-70mV"/>

    <pulseGenerator id="offset_current" delay="10ms" duration="290ms" amplitude="0.45nA"/>
    <pulseGenerator id="offsetToMin75" delay="0ms" duration="1000ms" amplitude="-120 pA" />

    <network id="net1">

      <network id="network" type="networkWithTemperature" temperature="34 degC">
          <population id="iafPop_Sensor" component="iafNeuron_Sensor" size="15" type="populationList">
              <instance id="0">
                  <location x="-50" y="100" z="0"/>
              </instance>
              <instance id="1">
                  <location x="-20" y="130" z="-30"/>
              </instance>
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          </population>

          <population id="vPop_Sensor" component="SingleCompMuscle" size="15" type="populationList">
              <instance id="0">
                  <location x="-50" y="60" z="0"/>
              </instance>
              <instance id="1">
                  <location x="-20" y="90" z="-30"/>
              </instance>
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
          </population>

          <population id="iafPop_Motor" component="iafNeuron_Motor" size="3" type="populationList">
              <instance id="0">
                  <location x="20" y="45" z="10"/>
              </instance>
              <instance id="1">
                  <location x="-20" y="45" z="10"/>
              </instance>
              <instance id="2">
                  <location x="0" y="45" z="-20"/>
              </instance>
          </population>

          <population id="vPop_Motor" component="SingleCompMuscle"  size="3" type="populationList">
              <instance id="0">
                  <location x="20" y="-40" z="10"/>
              </instance>
              <instance id="1">
                  <location x="-20" y="-40" z="10"/>
              </instance>
              <instance id="2">
                  <location x="0" y="-40" z="-20"/>
              </instance>
          </population>

        <projection id="N_M" postsynapticPopulation="iafPop_Motor" presynapticPopulation="iafPop_Sensor" synapse="exc_syn_1conns">
            <connection preCellId="../iafPop_Sensor/0/iafNeuron_Sensor" postCellId="../iafPop_Motor/0/SingleCompMuscleCell" id="0"/>
        </projection>

        <inputList id="offset_stim" component="offset_current" population="iafNeuron_Sensor">
            <input id="0" target="../iafPop_Sensor/0/iafNeuron_Sensor" destination="synapses"/>
        </inputList>

        <inputList id="offsetToMin75_stim" component="offsetToMin75" population="iafPop_Motor">
            <input id="0" target="../iafPop_Motor/0/SingleCompMuscleCell" destination="synapses"/>
        </inputList>

    </network>
</neuroml>
